// SBML level 3 version 1

model __main()

  // Compartments:
  compartment default_compartment = 1;

  // Species:
  species EPO in default_compartment = 15/default_compartment;
  species P in default_compartment = 453.3713/default_compartment;
  species R in default_compartment = 46391.75/default_compartment;
  species E in default_compartment = 5567010/default_compartment;
  species iE in default_compartment = 0;
  species diE in default_compartment = 0;
  species M in default_compartment = 0;
  species LDH in default_compartment = 180/default_compartment;
  species oiE in default_compartment = 0;

  // Parameters:
  niE = 0;
  OIE = 0;
  A = 0;
  I = 0;
  J_P_birth = k_P_birth;
  t_E_death = 120;
  t_iE_rupture = 4;
  t_diE_pitt = 0.25;
  t_oiE_death = 10;
  t_halb_LDH_decay = 4;
  KI_P_death = 15;
  b = 100;
  c = 0.04;
  d = -ln(0.5)/P;
  a = EPO*(1 - exp(-d*P))*(1 + exp((Hb - b)*c));
  k_P_birth = P*(k_P_death + k_P_aging);
  k_P_aging = ln(2)/(t_P_aging/2);
  k_R_death = 0.001;
  k_R_aging = ln(2)/(t_R_aging/2);
  k_E_death = ln(2)/(t_E_death/2);
  k_E_infect = 0;
  k_iE_death = 0.025;
  k_iE_rupture = ln(2)/(t_iE_rupture/2);
  k_M_death = 48;
  k_iE_ART = 0.01;
  k_diE_pitt = ln(2)/(t_diE_pitt/2);
  k_diE_death = 0.001;
  k_oiE_death = ln(2)/(t_oiE_death/2);
  LDH_conc_E = 6057.038;
  Vol_E = 8e-14;
  Vol_blood = 1e-6;
  Vol_R = 1e-13;
  k_LDH_decay = ln(2)/t_halb_LDH_decay;
  Vol_oiE = 5e-14;
  Hb_conc_R = 300;
  Hb_conc_E = 340;

  // Assignment rules:
  J_EPO_prod := k_EPO_prod;
  J_EPO_decay := EPO*k_EPO_decay;
  J_P_death := P*k_P_death;
  J_P_aging := P*k_P_aging;
  J_R_death := R*k_R_death;
  J_R_aging := R*k_R_aging;
  J_E_death := E*k_E_death;
  J_E_infect := E*M*k_E_infect;
  J_iE_death := iE*k_iE_death;
  J_iE_rupture := iE*k_iE_rupture;
  J_M_death := M*k_M_death;
  J_iE_ART := iE*k_iE_ART;
  J_diE_pitt := diE*k_diE_pitt;
  J_diE_death := diE*k_diE_death;
  J_oiE_death := oiE*k_oiE_death;
  J_LDH_release := J_E_death*LDH_conc_E*Vol_E/Vol_blood + J_R_death*LDH_conc_E*Vol_R/Vol_blood;
  J_LDH_decay := LDH*k_LDH_decay;
  t_P_aging := 5*Hkt + 7.75;
  Hkt := (Vol_E*E + Vol_R*R)/Vol_blood;
  t_R_aging := -5*Hkt + 3.25;
  Hb := (Vol_E*E*Hb_conc_E + Vol_R*R*Hb_conc_R)/Vol_blood;
  k_EPO_prod := a/(1 + exp((Hb - b)*c));
  k_EPO_decay := 1 - exp(-P*d);
  k_P_death := 1/(1 + EPO/KI_P_death);
  Hb_g_dl := Hb/10;
  p := iE/(E + R + iE + oiE + diE);
  R_percent := 100*R/(R + E);
  shift := -5*Hkt + 3.25;
  RPI := R_percent*Hkt/(shift*0.45);

  // Reactions:
  EPOprod: -> EPO; J_EPO_prod;
  EPOdecay: EPO -> ; J_EPO_decay;
  Pbirth: -> P; J_P_birth;
  Pdeath: P -> ; J_P_death;
  Page: P -> 1024 R; J_P_aging;
  Rdeath: R -> ; J_R_death;
  Raging: R -> E; J_R_aging;
  Edeath: E -> ; J_E_death;
  infect: E + M -> iE; J_E_infect;
  iEdeath: iE -> ; J_iE_death;
  iErupture: iE -> 16 M; J_iE_rupture;
  Mdeath: M -> ; J_M_death;
  iE_ART: iE -> diE; J_iE_ART;
  diE_pitt: diE -> oiE; J_diE_pitt;
  diE_death: diE -> ; J_diE_death;
  oiEdeath: oiE -> ; J_oiE_death;
  LDHrelease: -> LDH; J_LDH_release;
  LDHdecay: LDH -> ; J_LDH_decay;
end
